// SBML level 2 version 3

model multistate()

  // Compartments:
  compartment cell = 1;

  // Species:
  species R_a_l in cell = 5360/cell; R_a_l is "R(a,l)";
  species L_r in cell = 1160/cell; L_r is "L(r)";
  species A_Y_U_r in cell = 5360/cell; A_Y_U_r is "A(Y~U,r)";
  species L_r_1_R_a_l_1 in cell = 0; L_r_1_R_a_l_1 is "L(r!1).R(a,l!1)";
  species A_Y_U_r_1_R_a_1_l in cell = 0; A_Y_U_r_1_R_a_1_l is "A(Y~U,r!1).R(a!1,l)";
  species A_Y_U_r_1_L_r_2_R_a_1_l_2 in cell = 0; A_Y_U_r_1_L_r_2_R_a_1_l_2 is "A(Y~U,r!1).L(r!2).R(a!1,l!2)";
  species A_Y_P_r_1_L_r_2_R_a_1_l_2 in cell = 0; A_Y_P_r_1_L_r_2_R_a_1_l_2 is "A(Y~P,r!1).L(r!2).R(a!1,l!2)";
  species A_Y_P_r_1_R_a_1_l in cell = 0; A_Y_P_r_1_R_a_1_l is "A(Y~P,r!1).R(a!1,l)";
  species A_Y_P_r in cell = 0; A_Y_P_r is "A(Y~P,r)";

  // Parameters:
  R0 = 5360;
  L0 = 1160;
  A0 = 5360;
  kon = 0.01;
  koff = 0.1;
  kAon = 0.01;
  kAoff = 0.1;
  kAp = 0.01;
  kAdp = 0.1;

  // Assignment rules:
  A_P := A_Y_P_r_1_L_r_2_R_a_1_l_2 + A_Y_P_r_1_R_a_1_l + A_Y_P_r;
  A_unbound_P := 0 + A_Y_P_r;
  A_bound_P := A_Y_P_r_1_L_r_2_R_a_1_l_2 + A_Y_P_r_1_R_a_1_l;
  RLA_P := 0 + A_Y_P_r_1_L_r_2_R_a_1_l_2;

  // Reactions:
  R1: R_a_l + L_r => L_r_1_R_a_l_1; kon*R_a_l*L_r;
  R2: R_a_l + A_Y_U_r => A_Y_U_r_1_R_a_1_l; kAon*R_a_l*A_Y_U_r;
  R3: L_r + A_Y_U_r_1_R_a_1_l => A_Y_U_r_1_L_r_2_R_a_1_l_2; kon*L_r*A_Y_U_r_1_R_a_1_l;
  R4: L_r_1_R_a_l_1 => R_a_l + L_r; koff*L_r_1_R_a_l_1;
  R5: A_Y_U_r + L_r_1_R_a_l_1 => A_Y_U_r_1_L_r_2_R_a_1_l_2; kAon*A_Y_U_r*L_r_1_R_a_l_1;
  R6: A_Y_U_r_1_R_a_1_l => R_a_l + A_Y_U_r; kAoff*A_Y_U_r_1_R_a_1_l;
  R7: A_Y_U_r_1_L_r_2_R_a_1_l_2 => L_r + A_Y_U_r_1_R_a_1_l; koff*A_Y_U_r_1_L_r_2_R_a_1_l_2;
  R8: A_Y_U_r_1_L_r_2_R_a_1_l_2 => A_Y_U_r + L_r_1_R_a_l_1; kAoff*A_Y_U_r_1_L_r_2_R_a_1_l_2;
  R9: A_Y_U_r_1_L_r_2_R_a_1_l_2 => A_Y_P_r_1_L_r_2_R_a_1_l_2; kAp*A_Y_U_r_1_L_r_2_R_a_1_l_2;
  R10: A_Y_P_r_1_L_r_2_R_a_1_l_2 => L_r + A_Y_P_r_1_R_a_1_l; koff*A_Y_P_r_1_L_r_2_R_a_1_l_2;
  R11: A_Y_P_r_1_L_r_2_R_a_1_l_2 => L_r_1_R_a_l_1 + A_Y_P_r; kAoff*A_Y_P_r_1_L_r_2_R_a_1_l_2;
  R12: A_Y_P_r_1_L_r_2_R_a_1_l_2 => A_Y_U_r_1_L_r_2_R_a_1_l_2; kAdp*A_Y_P_r_1_L_r_2_R_a_1_l_2;
  R13: L_r + A_Y_P_r_1_R_a_1_l => A_Y_P_r_1_L_r_2_R_a_1_l_2; kon*L_r*A_Y_P_r_1_R_a_1_l;
  R14: R_a_l + A_Y_P_r => A_Y_P_r_1_R_a_1_l; kAon*R_a_l*A_Y_P_r;
  R15: L_r_1_R_a_l_1 + A_Y_P_r => A_Y_P_r_1_L_r_2_R_a_1_l_2; kAon*L_r_1_R_a_l_1*A_Y_P_r;
  R16: A_Y_P_r_1_R_a_1_l => R_a_l + A_Y_P_r; kAoff*A_Y_P_r_1_R_a_1_l;
  R17: A_Y_P_r_1_R_a_1_l => A_Y_U_r_1_R_a_1_l; kAdp*A_Y_P_r_1_R_a_1_l;
  R18: A_Y_P_r => A_Y_U_r; kAdp*A_Y_P_r;

  // Unit definitions:
  unit substance = item;
end
